*Heading
 Solar support; see assumptions and run metadata; N mm tonne s
** Job name: Solar_024_c125_rounded_r8 Model name: SolarSupport
** Generated by: Abaqus/CAE 2024
*Preprint, echo=NO, model=NO, history=NO, contact=NO
**
** PARTS
**
*Part, name=SteelFrame
*Node
      1,   17735.5449,   2433.50488,   2186.45581
      2,       18148.,   2433.50488,   2186.45581
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*Element, type=B31
1,   1, 141
2, 141, 142
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*Nset, nset=P2
   2,   3,   5,   9,  15,  21
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*Elset, elset=P2
   9,  10,  11,  12,  13,  14
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*Nset, nset=P3
   31,   38,   45,   52,   58,  103
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*Elset, elset=P3
 1498, 1499, 1500, 1501, 1502, 1503
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*Nset, nset=P4
    5,   35,   42,   49,   55,   61
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*Elset, elset=P4
  753,  754,  755,  756,  757,  758
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*Nset, nset=P5
    1,    2,    4,    6,    7,    8
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*Elset, elset=P5
    1,    2,    3,    4,    5,    6
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*Nset, nset=P6
   61,  103,  125,  127,  129,  131
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*Elset, elset=P6, generate
 2124,  2343,     1
** Section: P5  Profile: C100
*Beam Section, elset=P5, material=S235JR, poisson = 0.3, temperature=GRADIENTS, section=ARBITRARY
5, 29.1607, 30., 29.1607, 48., 4.
-16.8393, 48., 4.
-16.8393, -48., 4.
29.1607, -48., 4.
29.1607, -30., 4.
0.,0.906351,0.422525
** Section: P2  Profile: C125
*Beam Section, elset=P2, material=S355JR, poisson = 0.3, temperature=GRADIENTS, section=ARBITRARY
37, 37.4746, 37.5, 37.4746, 50.5, 4.
37.2824, 52.4509, 4.
36.7134, 54.3268, 4.
35.7893, 56.0557, 4.
34.5456, 57.5711, 4.
33.0303, 58.8147, 4.
31.3014, 59.7388, 4.
29.4255, 60.3079, 4.
27.4746, 60.5, 4.
-11.0254, 60.5, 4.
-12.9763, 60.3079, 4.
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1.,0.,0.
** Section: P4  Profile: C125
*Beam Section, elset=P4, material=S235JR, poisson = 0.3, temperature=GRADIENTS, section=ARBITRARY
37, 37.4746, 37.5, 37.4746, 50.5, 4.
37.2824, 52.4509, 4.
36.7134, 54.3268, 4.
35.7893, 56.0557, 4.
34.5456, 57.5711, 4.
33.0303, 58.8147, 4.
31.3014, 59.7388, 4.
29.4255, 60.3079, 4.
27.4746, 60.5, 4.
-11.0254, 60.5, 4.
-12.9763, 60.3079, 4.
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1.,0.,0.
** Section: P3  Profile: C125
*Beam Section, elset=P3, material=S235JR, poisson = 0.3, temperature=GRADIENTS, section=ARBITRARY
37, 37.4746, 37.5, 37.4746, 50.5, 4.
37.2824, 52.4509, 4.
36.7134, 54.3268, 4.
35.7893, 56.0557, 4.
34.5456, 57.5711, 4.
33.0303, 58.8147, 4.
31.3014, 59.7388, 4.
29.4255, 60.3079, 4.
27.4746, 60.5, 4.
-11.0254, 60.5, 4.
-12.9763, 60.3079, 4.
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1.,0.,0.
** Section: P6  Profile: C50
*Beam Section, elset=P6, material=S235JR, poisson = 0.3, temperature=GRADIENTS, section=ARBITRARY
3, 16.875, 22.5, -5.625, 22.5, 5.
-5.625, -22.5, 5.
16.875, -22.5, 5.
1.,0.,0.
*End Part
**
**
** ASSEMBLY
**
*Assembly, name=Assembly
**
*Instance, name=FRAME, part=SteelFrame
*End Instance
**
*Nset, nset=BASES, instance=FRAME
  62, 104, 126, 128, 130, 132, 134, 136, 138, 140
*Nset, nset=CONTACT_ROW_1, instance=FRAME
  39,  53, 105, 106, 107, 108
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*Nset, nset=CONTACT_ROW_2, instance=FRAME
  37,  51,  83,  84,  85,  86
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*Nset, nset=CONTACT_ROW_3, instance=FRAME
 36, 50, 63, 64, 65, 66
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*Nset, nset=CONTACT_ROW_4, instance=FRAME
  1,  4,  6,  7,  8,  9
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*End Assembly
**
** MATERIALS
**
*Material, name=S235JR
*Density
 7.85e-09,
*Elastic
210000., 0.3
*Material, name=S355JR
*Density
 7.85e-09,
*Elastic
210000., 0.3
**
** BOUNDARY CONDITIONS
**
** Name: GroundFixity Type: Symmetry/Antisymmetry/Encastre
*Boundary
BASES, ENCASTRE
** ----------------------------------------------------------------
**
** STEP: D
**
*Step, name=D, nlgeom=NO, inc=1000
*Static
1., 1., 1e-05, 1.
**
** LOADS
**
** Name: D_Contact_1   Type: Concentrated force
*Cload, op=NEW
CONTACT_ROW_1, 2, 0.
CONTACT_ROW_1, 3, -126.993
** Name: D_Contact_2   Type: Concentrated force
*Cload, op=NEW
CONTACT_ROW_2, 2, 0.
CONTACT_ROW_2, 3, -126.993
** Name: D_Contact_3   Type: Concentrated force
*Cload, op=NEW
CONTACT_ROW_3, 2, 0.
CONTACT_ROW_3, 3, -126.993
** Name: D_Contact_4   Type: Concentrated force
*Cload, op=NEW
CONTACT_ROW_4, 2, 0.
CONTACT_ROW_4, 3, -126.993
** Name: D_SteelGravity   Type: Gravity
*Dload, op=NEW
, GRAV, 9810., 0., 0., -1.
**
** OUTPUT REQUESTS
**
*Restart, write, frequency=0
**
** FIELD OUTPUT: Nodal
**
*Output, field, frequency=99999
*Node Output
RF, RM, U
**
** FIELD OUTPUT: Section_P2
**
*Element Output, elset=FRAME.P2, directions=YES
1, 2, 3, 4, 5, 6, 7, 8, 9, 10, 11, 12, 13, 14, 15, 16
S, SF
*Element Output, elset=FRAME.P2, directions=YES
17, 18, 19, 20, 21, 22, 23, 24, 25, 26, 27, 28, 29, 30, 31, 32
S, SF
*Element Output, elset=FRAME.P2, directions=YES
33, 34, 35, 36, 37, 38, 39, 40, 41, 42, 43, 44, 45, 46, 47, 48
S, SF
*Element Output, elset=FRAME.P2, directions=YES
49, 50, 51, 52, 53, 54, 55, 56, 57, 58, 59, 60, 61, 62, 63, 64
S, SF
*Element Output, elset=FRAME.P2, directions=YES
65, 66, 67, 68, 69, 70, 71, 72, 73, 74, 75
S, SF
**
** FIELD OUTPUT: Section_P3
**
*Element Output, elset=FRAME.P3, directions=YES
1, 2, 3, 4, 5, 6, 7, 8, 9, 10, 11, 12, 13, 14, 15, 16
S, SF
*Element Output, elset=FRAME.P3, directions=YES
17, 18, 19, 20, 21, 22, 23, 24, 25, 26, 27, 28, 29, 30, 31, 32
S, SF
*Element Output, elset=FRAME.P3, directions=YES
33, 34, 35, 36, 37, 38, 39, 40, 41, 42, 43, 44, 45, 46, 47, 48
S, SF
*Element Output, elset=FRAME.P3, directions=YES
49, 50, 51, 52, 53, 54, 55, 56, 57, 58, 59, 60, 61, 62, 63, 64
S, SF
*Element Output, elset=FRAME.P3, directions=YES
65, 66, 67, 68, 69, 70, 71, 72, 73, 74, 75
S, SF
**
** FIELD OUTPUT: Section_P4
**
*Element Output, elset=FRAME.P4, directions=YES
1, 2, 3, 4, 5, 6, 7, 8, 9, 10, 11, 12, 13, 14, 15, 16
S, SF
*Element Output, elset=FRAME.P4, directions=YES
17, 18, 19, 20, 21, 22, 23, 24, 25, 26, 27, 28, 29, 30, 31, 32
S, SF
*Element Output, elset=FRAME.P4, directions=YES
33, 34, 35, 36, 37, 38, 39, 40, 41, 42, 43, 44, 45, 46, 47, 48
S, SF
*Element Output, elset=FRAME.P4, directions=YES
49, 50, 51, 52, 53, 54, 55, 56, 57, 58, 59, 60, 61, 62, 63, 64
S, SF
*Element Output, elset=FRAME.P4, directions=YES
65, 66, 67, 68, 69, 70, 71, 72, 73, 74, 75
S, SF
**
** FIELD OUTPUT: Section_P5
**
*Element Output, elset=FRAME.P5, directions=YES
1, 2, 3, 4, 5, 6, 7, 8, 9, 10, 11
S, SF
**
** FIELD OUTPUT: Section_P6
**
*Element Output, elset=FRAME.P6, directions=YES
1, 2, 3, 4, 5, 6, 7
S, SF
**
** HISTORY OUTPUT: Energy
**
*Output, history
*Energy Output
ALLSE, ALLWK
*End Step
** ----------------------------------------------------------------
**
** STEP: S
**
*Step, name=S, nlgeom=NO, inc=1000
*Static
1., 1., 1e-05, 1.
**
** LOADS
**
** Name: D_Contact_1   Type: Concentrated force
*Cload, op=NEW
** Name: D_Contact_2   Type: Concentrated force
*Cload, op=NEW
** Name: D_Contact_3   Type: Concentrated force
*Cload, op=NEW
** Name: D_Contact_4   Type: Concentrated force
*Cload, op=NEW
** Name: D_SteelGravity   Type: Gravity
*Dload, op=NEW
** Name: S_Contact_1   Type: Concentrated force
*Cload, op=NEW
CONTACT_ROW_1, 2, 0.
CONTACT_ROW_1, 3, -733.2
** Name: S_Contact_2   Type: Concentrated force
*Cload, op=NEW
CONTACT_ROW_2, 2, 0.
CONTACT_ROW_2, 3, -733.2
** Name: S_Contact_3   Type: Concentrated force
*Cload, op=NEW
CONTACT_ROW_3, 2, 0.
CONTACT_ROW_3, 3, -733.2
** Name: S_Contact_4   Type: Concentrated force
*Cload, op=NEW
CONTACT_ROW_4, 2, 0.
CONTACT_ROW_4, 3, -733.2
**
** OUTPUT REQUESTS
**
*Restart, write, frequency=0
**
** FIELD OUTPUT: Nodal
**
*Output, field, frequency=99999
*Node Output
RF, RM, U
**
** FIELD OUTPUT: Section_P2
**
*Element Output, elset=FRAME.P2, directions=YES
1, 2, 3, 4, 5, 6, 7, 8, 9, 10, 11, 12, 13, 14, 15, 16
S, SF
*Element Output, elset=FRAME.P2, directions=YES
17, 18, 19, 20, 21, 22, 23, 24, 25, 26, 27, 28, 29, 30, 31, 32
S, SF
*Element Output, elset=FRAME.P2, directions=YES
33, 34, 35, 36, 37, 38, 39, 40, 41, 42, 43, 44, 45, 46, 47, 48
S, SF
*Element Output, elset=FRAME.P2, directions=YES
49, 50, 51, 52, 53, 54, 55, 56, 57, 58, 59, 60, 61, 62, 63, 64
S, SF
*Element Output, elset=FRAME.P2, directions=YES
65, 66, 67, 68, 69, 70, 71, 72, 73, 74, 75
S, SF
**
** FIELD OUTPUT: Section_P3
**
*Element Output, elset=FRAME.P3, directions=YES
1, 2, 3, 4, 5, 6, 7, 8, 9, 10, 11, 12, 13, 14, 15, 16
S, SF
*Element Output, elset=FRAME.P3, directions=YES
17, 18, 19, 20, 21, 22, 23, 24, 25, 26, 27, 28, 29, 30, 31, 32
S, SF
*Element Output, elset=FRAME.P3, directions=YES
33, 34, 35, 36, 37, 38, 39, 40, 41, 42, 43, 44, 45, 46, 47, 48
S, SF
*Element Output, elset=FRAME.P3, directions=YES
49, 50, 51, 52, 53, 54, 55, 56, 57, 58, 59, 60, 61, 62, 63, 64
S, SF
*Element Output, elset=FRAME.P3, directions=YES
65, 66, 67, 68, 69, 70, 71, 72, 73, 74, 75
S, SF
**
** FIELD OUTPUT: Section_P4
**
*Element Output, elset=FRAME.P4, directions=YES
1, 2, 3, 4, 5, 6, 7, 8, 9, 10, 11, 12, 13, 14, 15, 16
S, SF
*Element Output, elset=FRAME.P4, directions=YES
17, 18, 19, 20, 21, 22, 23, 24, 25, 26, 27, 28, 29, 30, 31, 32
S, SF
*Element Output, elset=FRAME.P4, directions=YES
33, 34, 35, 36, 37, 38, 39, 40, 41, 42, 43, 44, 45, 46, 47, 48
S, SF
*Element Output, elset=FRAME.P4, directions=YES
49, 50, 51, 52, 53, 54, 55, 56, 57, 58, 59, 60, 61, 62, 63, 64
S, SF
*Element Output, elset=FRAME.P4, directions=YES
65, 66, 67, 68, 69, 70, 71, 72, 73, 74, 75
S, SF
**
** FIELD OUTPUT: Section_P5
**
*Element Output, elset=FRAME.P5, directions=YES
1, 2, 3, 4, 5, 6, 7, 8, 9, 10, 11
S, SF
**
** FIELD OUTPUT: Section_P6
**
*Element Output, elset=FRAME.P6, directions=YES
1, 2, 3, 4, 5, 6, 7
S, SF
**
** HISTORY OUTPUT: Energy
**
*Output, history
*Energy Output
ALLSE, ALLWK
*End Step
** ----------------------------------------------------------------
**
** STEP: W
**
*Step, name=W, nlgeom=NO, inc=1000
*Static
1., 1., 1e-05, 1.
**
** LOADS
**
** Name: S_Contact_1   Type: Concentrated force
*Cload, op=NEW
** Name: S_Contact_2   Type: Concentrated force
*Cload, op=NEW
** Name: S_Contact_3   Type: Concentrated force
*Cload, op=NEW
** Name: S_Contact_4   Type: Concentrated force
*Cload, op=NEW
** Name: W_Contact_1   Type: Concentrated force
*Cload, op=NEW
CONTACT_ROW_1, 2, 35.556
CONTACT_ROW_1, 3, -76.2707
** Name: W_Contact_2   Type: Concentrated force
*Cload, op=NEW
CONTACT_ROW_2, 2, 35.556
CONTACT_ROW_2, 3, -76.2707
** Name: W_Contact_3   Type: Concentrated force
*Cload, op=NEW
CONTACT_ROW_3, 2, 35.556
CONTACT_ROW_3, 3, -76.2707
** Name: W_Contact_4   Type: Concentrated force
*Cload, op=NEW
CONTACT_ROW_4, 2, 35.556
CONTACT_ROW_4, 3, -76.2707
**
** OUTPUT REQUESTS
**
*Restart, write, frequency=0
**
** FIELD OUTPUT: Nodal
**
*Output, field, frequency=99999
*Node Output
RF, RM, U
**
** FIELD OUTPUT: Section_P2
**
*Element Output, elset=FRAME.P2, directions=YES
1, 2, 3, 4, 5, 6, 7, 8, 9, 10, 11, 12, 13, 14, 15, 16
S, SF
*Element Output, elset=FRAME.P2, directions=YES
17, 18, 19, 20, 21, 22, 23, 24, 25, 26, 27, 28, 29, 30, 31, 32
S, SF
*Element Output, elset=FRAME.P2, directions=YES
33, 34, 35, 36, 37, 38, 39, 40, 41, 42, 43, 44, 45, 46, 47, 48
S, SF
*Element Output, elset=FRAME.P2, directions=YES
49, 50, 51, 52, 53, 54, 55, 56, 57, 58, 59, 60, 61, 62, 63, 64
S, SF
*Element Output, elset=FRAME.P2, directions=YES
65, 66, 67, 68, 69, 70, 71, 72, 73, 74, 75
S, SF
**
** FIELD OUTPUT: Section_P3
**
*Element Output, elset=FRAME.P3, directions=YES
1, 2, 3, 4, 5, 6, 7, 8, 9, 10, 11, 12, 13, 14, 15, 16
S, SF
*Element Output, elset=FRAME.P3, directions=YES
17, 18, 19, 20, 21, 22, 23, 24, 25, 26, 27, 28, 29, 30, 31, 32
S, SF
*Element Output, elset=FRAME.P3, directions=YES
33, 34, 35, 36, 37, 38, 39, 40, 41, 42, 43, 44, 45, 46, 47, 48
S, SF
*Element Output, elset=FRAME.P3, directions=YES
49, 50, 51, 52, 53, 54, 55, 56, 57, 58, 59, 60, 61, 62, 63, 64
S, SF
*Element Output, elset=FRAME.P3, directions=YES
65, 66, 67, 68, 69, 70, 71, 72, 73, 74, 75
S, SF
**
** FIELD OUTPUT: Section_P4
**
*Element Output, elset=FRAME.P4, directions=YES
1, 2, 3, 4, 5, 6, 7, 8, 9, 10, 11, 12, 13, 14, 15, 16
S, SF
*Element Output, elset=FRAME.P4, directions=YES
17, 18, 19, 20, 21, 22, 23, 24, 25, 26, 27, 28, 29, 30, 31, 32
S, SF
*Element Output, elset=FRAME.P4, directions=YES
33, 34, 35, 36, 37, 38, 39, 40, 41, 42, 43, 44, 45, 46, 47, 48
S, SF
*Element Output, elset=FRAME.P4, directions=YES
49, 50, 51, 52, 53, 54, 55, 56, 57, 58, 59, 60, 61, 62, 63, 64
S, SF
*Element Output, elset=FRAME.P4, directions=YES
65, 66, 67, 68, 69, 70, 71, 72, 73, 74, 75
S, SF
**
** FIELD OUTPUT: Section_P5
**
*Element Output, elset=FRAME.P5, directions=YES
1, 2, 3, 4, 5, 6, 7, 8, 9, 10, 11
S, SF
**
** FIELD OUTPUT: Section_P6
**
*Element Output, elset=FRAME.P6, directions=YES
1, 2, 3, 4, 5, 6, 7
S, SF
**
** HISTORY OUTPUT: Energy
**
*Output, history
*Energy Output
ALLSE, ALLWK
*End Step
** ----------------------------------------------------------------
**
** STEP: D_07S
**
*Step, name=D_07S, nlgeom=NO, inc=1000
*Static
1., 1., 1e-05, 1.
**
** LOADS
**
** Name: D_07S_Contact_1   Type: Concentrated force
*Cload, op=NEW
CONTACT_ROW_1, 2, 0.
CONTACT_ROW_1, 3, -640.233
** Name: D_07S_Contact_2   Type: Concentrated force
*Cload, op=NEW
CONTACT_ROW_2, 2, 0.
CONTACT_ROW_2, 3, -640.233
** Name: D_07S_Contact_3   Type: Concentrated force
*Cload, op=NEW
CONTACT_ROW_3, 2, 0.
CONTACT_ROW_3, 3, -640.233
** Name: D_07S_Contact_4   Type: Concentrated force
*Cload, op=NEW
CONTACT_ROW_4, 2, 0.
CONTACT_ROW_4, 3, -640.233
** Name: D_07S_SteelGravity   Type: Gravity
*Dload, op=NEW
, GRAV, 9810., 0., 0., -1.
** Name: W_Contact_1   Type: Concentrated force
*Cload, op=NEW
** Name: W_Contact_2   Type: Concentrated force
*Cload, op=NEW
** Name: W_Contact_3   Type: Concentrated force
*Cload, op=NEW
** Name: W_Contact_4   Type: Concentrated force
*Cload, op=NEW
**
** OUTPUT REQUESTS
**
*Restart, write, frequency=0
**
** FIELD OUTPUT: Nodal
**
*Output, field, frequency=99999
*Node Output
RF, RM, U
**
** FIELD OUTPUT: Section_P2
**
*Element Output, elset=FRAME.P2, directions=YES
1, 2, 3, 4, 5, 6, 7, 8, 9, 10, 11, 12, 13, 14, 15, 16
S, SF
*Element Output, elset=FRAME.P2, directions=YES
17, 18, 19, 20, 21, 22, 23, 24, 25, 26, 27, 28, 29, 30, 31, 32
S, SF
*Element Output, elset=FRAME.P2, directions=YES
33, 34, 35, 36, 37, 38, 39, 40, 41, 42, 43, 44, 45, 46, 47, 48
S, SF
*Element Output, elset=FRAME.P2, directions=YES
49, 50, 51, 52, 53, 54, 55, 56, 57, 58, 59, 60, 61, 62, 63, 64
S, SF
*Element Output, elset=FRAME.P2, directions=YES
65, 66, 67, 68, 69, 70, 71, 72, 73, 74, 75
S, SF
**
** FIELD OUTPUT: Section_P3
**
*Element Output, elset=FRAME.P3, directions=YES
1, 2, 3, 4, 5, 6, 7, 8, 9, 10, 11, 12, 13, 14, 15, 16
S, SF
*Element Output, elset=FRAME.P3, directions=YES
17, 18, 19, 20, 21, 22, 23, 24, 25, 26, 27, 28, 29, 30, 31, 32
S, SF
*Element Output, elset=FRAME.P3, directions=YES
33, 34, 35, 36, 37, 38, 39, 40, 41, 42, 43, 44, 45, 46, 47, 48
S, SF
*Element Output, elset=FRAME.P3, directions=YES
49, 50, 51, 52, 53, 54, 55, 56, 57, 58, 59, 60, 61, 62, 63, 64
S, SF
*Element Output, elset=FRAME.P3, directions=YES
65, 66, 67, 68, 69, 70, 71, 72, 73, 74, 75
S, SF
**
** FIELD OUTPUT: Section_P4
**
*Element Output, elset=FRAME.P4, directions=YES
1, 2, 3, 4, 5, 6, 7, 8, 9, 10, 11, 12, 13, 14, 15, 16
S, SF
*Element Output, elset=FRAME.P4, directions=YES
17, 18, 19, 20, 21, 22, 23, 24, 25, 26, 27, 28, 29, 30, 31, 32
S, SF
*Element Output, elset=FRAME.P4, directions=YES
33, 34, 35, 36, 37, 38, 39, 40, 41, 42, 43, 44, 45, 46, 47, 48
S, SF
*Element Output, elset=FRAME.P4, directions=YES
49, 50, 51, 52, 53, 54, 55, 56, 57, 58, 59, 60, 61, 62, 63, 64
S, SF
*Element Output, elset=FRAME.P4, directions=YES
65, 66, 67, 68, 69, 70, 71, 72, 73, 74, 75
S, SF
**
** FIELD OUTPUT: Section_P5
**
*Element Output, elset=FRAME.P5, directions=YES
1, 2, 3, 4, 5, 6, 7, 8, 9, 10, 11
S, SF
**
** FIELD OUTPUT: Section_P6
**
*Element Output, elset=FRAME.P6, directions=YES
1, 2, 3, 4, 5, 6, 7
S, SF
**
** HISTORY OUTPUT: Energy
**
*Output, history
*Energy Output
ALLSE, ALLWK
*End Step
** ----------------------------------------------------------------
**
** STEP: D_S
**
*Step, name=D_S, nlgeom=NO, inc=1000
*Static
1., 1., 1e-05, 1.
**
** LOADS
**
** Name: D_07S_Contact_1   Type: Concentrated force
*Cload, op=NEW
** Name: D_07S_Contact_2   Type: Concentrated force
*Cload, op=NEW
** Name: D_07S_Contact_3   Type: Concentrated force
*Cload, op=NEW
** Name: D_07S_Contact_4   Type: Concentrated force
*Cload, op=NEW
** Name: D_07S_SteelGravity   Type: Gravity
*Dload, op=NEW
** Name: D_S_Contact_1   Type: Concentrated force
*Cload, op=NEW
CONTACT_ROW_1, 2, 0.
CONTACT_ROW_1, 3, -860.193
** Name: D_S_Contact_2   Type: Concentrated force
*Cload, op=NEW
CONTACT_ROW_2, 2, 0.
CONTACT_ROW_2, 3, -860.193
** Name: D_S_Contact_3   Type: Concentrated force
*Cload, op=NEW
CONTACT_ROW_3, 2, 0.
CONTACT_ROW_3, 3, -860.193
** Name: D_S_Contact_4   Type: Concentrated force
*Cload, op=NEW
CONTACT_ROW_4, 2, 0.
CONTACT_ROW_4, 3, -860.193
** Name: D_S_SteelGravity   Type: Gravity
*Dload, op=NEW
, GRAV, 9810., 0., 0., -1.
**
** OUTPUT REQUESTS
**
*Restart, write, frequency=0
**
** FIELD OUTPUT: Nodal
**
*Output, field, frequency=99999
*Node Output
RF, RM, U
**
** FIELD OUTPUT: Section_P2
**
*Element Output, elset=FRAME.P2, directions=YES
1, 2, 3, 4, 5, 6, 7, 8, 9, 10, 11, 12, 13, 14, 15, 16
S, SF
*Element Output, elset=FRAME.P2, directions=YES
17, 18, 19, 20, 21, 22, 23, 24, 25, 26, 27, 28, 29, 30, 31, 32
S, SF
*Element Output, elset=FRAME.P2, directions=YES
33, 34, 35, 36, 37, 38, 39, 40, 41, 42, 43, 44, 45, 46, 47, 48
S, SF
*Element Output, elset=FRAME.P2, directions=YES
49, 50, 51, 52, 53, 54, 55, 56, 57, 58, 59, 60, 61, 62, 63, 64
S, SF
*Element Output, elset=FRAME.P2, directions=YES
65, 66, 67, 68, 69, 70, 71, 72, 73, 74, 75
S, SF
**
** FIELD OUTPUT: Section_P3
**
*Element Output, elset=FRAME.P3, directions=YES
1, 2, 3, 4, 5, 6, 7, 8, 9, 10, 11, 12, 13, 14, 15, 16
S, SF
*Element Output, elset=FRAME.P3, directions=YES
17, 18, 19, 20, 21, 22, 23, 24, 25, 26, 27, 28, 29, 30, 31, 32
S, SF
*Element Output, elset=FRAME.P3, directions=YES
33, 34, 35, 36, 37, 38, 39, 40, 41, 42, 43, 44, 45, 46, 47, 48
S, SF
*Element Output, elset=FRAME.P3, directions=YES
49, 50, 51, 52, 53, 54, 55, 56, 57, 58, 59, 60, 61, 62, 63, 64
S, SF
*Element Output, elset=FRAME.P3, directions=YES
65, 66, 67, 68, 69, 70, 71, 72, 73, 74, 75
S, SF
**
** FIELD OUTPUT: Section_P4
**
*Element Output, elset=FRAME.P4, directions=YES
1, 2, 3, 4, 5, 6, 7, 8, 9, 10, 11, 12, 13, 14, 15, 16
S, SF
*Element Output, elset=FRAME.P4, directions=YES
17, 18, 19, 20, 21, 22, 23, 24, 25, 26, 27, 28, 29, 30, 31, 32
S, SF
*Element Output, elset=FRAME.P4, directions=YES
33, 34, 35, 36, 37, 38, 39, 40, 41, 42, 43, 44, 45, 46, 47, 48
S, SF
*Element Output, elset=FRAME.P4, directions=YES
49, 50, 51, 52, 53, 54, 55, 56, 57, 58, 59, 60, 61, 62, 63, 64
S, SF
*Element Output, elset=FRAME.P4, directions=YES
65, 66, 67, 68, 69, 70, 71, 72, 73, 74, 75
S, SF
**
** FIELD OUTPUT: Section_P5
**
*Element Output, elset=FRAME.P5, directions=YES
1, 2, 3, 4, 5, 6, 7, 8, 9, 10, 11
S, SF
**
** FIELD OUTPUT: Section_P6
**
*Element Output, elset=FRAME.P6, directions=YES
1, 2, 3, 4, 5, 6, 7
S, SF
**
** HISTORY OUTPUT: Energy
**
*Output, history
*Energy Output
ALLSE, ALLWK
*End Step
** ----------------------------------------------------------------
**
** STEP: D_S_W
**
*Step, name=D_S_W, nlgeom=NO, inc=1000
*Static
1., 1., 1e-05, 1.
**
** LOADS
**
** Name: D_S_Contact_1   Type: Concentrated force
*Cload, op=NEW
** Name: D_S_Contact_2   Type: Concentrated force
*Cload, op=NEW
** Name: D_S_Contact_3   Type: Concentrated force
*Cload, op=NEW
** Name: D_S_Contact_4   Type: Concentrated force
*Cload, op=NEW
** Name: D_S_SteelGravity   Type: Gravity
*Dload, op=NEW
** Name: D_S_W_Contact_1   Type: Concentrated force
*Cload, op=NEW
CONTACT_ROW_1, 2, 35.556
CONTACT_ROW_1, 3, -936.463
** Name: D_S_W_Contact_2   Type: Concentrated force
*Cload, op=NEW
CONTACT_ROW_2, 2, 35.556
CONTACT_ROW_2, 3, -936.463
** Name: D_S_W_Contact_3   Type: Concentrated force
*Cload, op=NEW
CONTACT_ROW_3, 2, 35.556
CONTACT_ROW_3, 3, -936.463
** Name: D_S_W_Contact_4   Type: Concentrated force
*Cload, op=NEW
CONTACT_ROW_4, 2, 35.556
CONTACT_ROW_4, 3, -936.463
** Name: D_S_W_SteelGravity   Type: Gravity
*Dload, op=NEW
, GRAV, 9810., 0., 0., -1.
**
** OUTPUT REQUESTS
**
*Restart, write, frequency=0
**
** FIELD OUTPUT: Nodal
**
*Output, field, frequency=99999
*Node Output
RF, RM, U
**
** FIELD OUTPUT: Section_P2
**
*Element Output, elset=FRAME.P2, directions=YES
1, 2, 3, 4, 5, 6, 7, 8, 9, 10, 11, 12, 13, 14, 15, 16
S, SF
*Element Output, elset=FRAME.P2, directions=YES
17, 18, 19, 20, 21, 22, 23, 24, 25, 26, 27, 28, 29, 30, 31, 32
S, SF
*Element Output, elset=FRAME.P2, directions=YES
33, 34, 35, 36, 37, 38, 39, 40, 41, 42, 43, 44, 45, 46, 47, 48
S, SF
*Element Output, elset=FRAME.P2, directions=YES
49, 50, 51, 52, 53, 54, 55, 56, 57, 58, 59, 60, 61, 62, 63, 64
S, SF
*Element Output, elset=FRAME.P2, directions=YES
65, 66, 67, 68, 69, 70, 71, 72, 73, 74, 75
S, SF
**
** FIELD OUTPUT: Section_P3
**
*Element Output, elset=FRAME.P3, directions=YES
1, 2, 3, 4, 5, 6, 7, 8, 9, 10, 11, 12, 13, 14, 15, 16
S, SF
*Element Output, elset=FRAME.P3, directions=YES
17, 18, 19, 20, 21, 22, 23, 24, 25, 26, 27, 28, 29, 30, 31, 32
S, SF
*Element Output, elset=FRAME.P3, directions=YES
33, 34, 35, 36, 37, 38, 39, 40, 41, 42, 43, 44, 45, 46, 47, 48
S, SF
*Element Output, elset=FRAME.P3, directions=YES
49, 50, 51, 52, 53, 54, 55, 56, 57, 58, 59, 60, 61, 62, 63, 64
S, SF
*Element Output, elset=FRAME.P3, directions=YES
65, 66, 67, 68, 69, 70, 71, 72, 73, 74, 75
S, SF
**
** FIELD OUTPUT: Section_P4
**
*Element Output, elset=FRAME.P4, directions=YES
1, 2, 3, 4, 5, 6, 7, 8, 9, 10, 11, 12, 13, 14, 15, 16
S, SF
*Element Output, elset=FRAME.P4, directions=YES
17, 18, 19, 20, 21, 22, 23, 24, 25, 26, 27, 28, 29, 30, 31, 32
S, SF
*Element Output, elset=FRAME.P4, directions=YES
33, 34, 35, 36, 37, 38, 39, 40, 41, 42, 43, 44, 45, 46, 47, 48
S, SF
*Element Output, elset=FRAME.P4, directions=YES
49, 50, 51, 52, 53, 54, 55, 56, 57, 58, 59, 60, 61, 62, 63, 64
S, SF
*Element Output, elset=FRAME.P4, directions=YES
65, 66, 67, 68, 69, 70, 71, 72, 73, 74, 75
S, SF
**
** FIELD OUTPUT: Section_P5
**
*Element Output, elset=FRAME.P5, directions=YES
1, 2, 3, 4, 5, 6, 7, 8, 9, 10, 11
S, SF
**
** FIELD OUTPUT: Section_P6
**
*Element Output, elset=FRAME.P6, directions=YES
1, 2, 3, 4, 5, 6, 7
S, SF
**
** HISTORY OUTPUT: Energy
**
*Output, history
*Energy Output
ALLSE, ALLWK
*End Step
** ----------------------------------------------------------------
**
** STEP: D_S_mW
**
*Step, name=D_S_mW, nlgeom=NO, inc=1000
*Static
1., 1., 1e-05, 1.
**
** LOADS
**
** Name: D_S_W_Contact_1   Type: Concentrated force
*Cload, op=NEW
** Name: D_S_W_Contact_2   Type: Concentrated force
*Cload, op=NEW
** Name: D_S_W_Contact_3   Type: Concentrated force
*Cload, op=NEW
** Name: D_S_W_Contact_4   Type: Concentrated force
*Cload, op=NEW
** Name: D_S_W_SteelGravity   Type: Gravity
*Dload, op=NEW
** Name: D_S_mW_Contact_1   Type: Concentrated force
*Cload, op=NEW
CONTACT_ROW_1, 2, -35.556
CONTACT_ROW_1, 3, -783.922
** Name: D_S_mW_Contact_2   Type: Concentrated force
*Cload, op=NEW
CONTACT_ROW_2, 2, -35.556
CONTACT_ROW_2, 3, -783.922
** Name: D_S_mW_Contact_3   Type: Concentrated force
*Cload, op=NEW
CONTACT_ROW_3, 2, -35.556
CONTACT_ROW_3, 3, -783.922
** Name: D_S_mW_Contact_4   Type: Concentrated force
*Cload, op=NEW
CONTACT_ROW_4, 2, -35.556
CONTACT_ROW_4, 3, -783.922
** Name: D_S_mW_SteelGravity   Type: Gravity
*Dload, op=NEW
, GRAV, 9810., 0., 0., -1.
**
** OUTPUT REQUESTS
**
*Restart, write, frequency=0
**
** FIELD OUTPUT: Nodal
**
*Output, field, frequency=99999
*Node Output
RF, RM, U
**
** FIELD OUTPUT: Section_P2
**
*Element Output, elset=FRAME.P2, directions=YES
1, 2, 3, 4, 5, 6, 7, 8, 9, 10, 11, 12, 13, 14, 15, 16
S, SF
*Element Output, elset=FRAME.P2, directions=YES
17, 18, 19, 20, 21, 22, 23, 24, 25, 26, 27, 28, 29, 30, 31, 32
S, SF
*Element Output, elset=FRAME.P2, directions=YES
33, 34, 35, 36, 37, 38, 39, 40, 41, 42, 43, 44, 45, 46, 47, 48
S, SF
*Element Output, elset=FRAME.P2, directions=YES
49, 50, 51, 52, 53, 54, 55, 56, 57, 58, 59, 60, 61, 62, 63, 64
S, SF
*Element Output, elset=FRAME.P2, directions=YES
65, 66, 67, 68, 69, 70, 71, 72, 73, 74, 75
S, SF
**
** FIELD OUTPUT: Section_P3
**
*Element Output, elset=FRAME.P3, directions=YES
1, 2, 3, 4, 5, 6, 7, 8, 9, 10, 11, 12, 13, 14, 15, 16
S, SF
*Element Output, elset=FRAME.P3, directions=YES
17, 18, 19, 20, 21, 22, 23, 24, 25, 26, 27, 28, 29, 30, 31, 32
S, SF
*Element Output, elset=FRAME.P3, directions=YES
33, 34, 35, 36, 37, 38, 39, 40, 41, 42, 43, 44, 45, 46, 47, 48
S, SF
*Element Output, elset=FRAME.P3, directions=YES
49, 50, 51, 52, 53, 54, 55, 56, 57, 58, 59, 60, 61, 62, 63, 64
S, SF
*Element Output, elset=FRAME.P3, directions=YES
65, 66, 67, 68, 69, 70, 71, 72, 73, 74, 75
S, SF
**
** FIELD OUTPUT: Section_P4
**
*Element Output, elset=FRAME.P4, directions=YES
1, 2, 3, 4, 5, 6, 7, 8, 9, 10, 11, 12, 13, 14, 15, 16
S, SF
*Element Output, elset=FRAME.P4, directions=YES
17, 18, 19, 20, 21, 22, 23, 24, 25, 26, 27, 28, 29, 30, 31, 32
S, SF
*Element Output, elset=FRAME.P4, directions=YES
33, 34, 35, 36, 37, 38, 39, 40, 41, 42, 43, 44, 45, 46, 47, 48
S, SF
*Element Output, elset=FRAME.P4, directions=YES
49, 50, 51, 52, 53, 54, 55, 56, 57, 58, 59, 60, 61, 62, 63, 64
S, SF
*Element Output, elset=FRAME.P4, directions=YES
65, 66, 67, 68, 69, 70, 71, 72, 73, 74, 75
S, SF
**
** FIELD OUTPUT: Section_P5
**
*Element Output, elset=FRAME.P5, directions=YES
1, 2, 3, 4, 5, 6, 7, 8, 9, 10, 11
S, SF
**
** FIELD OUTPUT: Section_P6
**
*Element Output, elset=FRAME.P6, directions=YES
1, 2, 3, 4, 5, 6, 7
S, SF
**
** HISTORY OUTPUT: Energy
**
*Output, history
*Energy Output
ALLSE, ALLWK
*End Step
** ----------------------------------------------------------------
**
** STEP: C09D_W
**
*Step, name=C09D_W, nlgeom=NO, inc=1000
*Static
1., 1., 1e-05, 1.
**
** LOADS
**
** Name: C09D_W_Contact_1   Type: Concentrated force
*Cload, op=NEW
CONTACT_ROW_1, 2, 35.556
CONTACT_ROW_1, 3, -190.564
** Name: C09D_W_Contact_2   Type: Concentrated force
*Cload, op=NEW
CONTACT_ROW_2, 2, 35.556
CONTACT_ROW_2, 3, -190.564
** Name: C09D_W_Contact_3   Type: Concentrated force
*Cload, op=NEW
CONTACT_ROW_3, 2, 35.556
CONTACT_ROW_3, 3, -190.564
** Name: C09D_W_Contact_4   Type: Concentrated force
*Cload, op=NEW
CONTACT_ROW_4, 2, 35.556
CONTACT_ROW_4, 3, -190.564
** Name: C09D_W_SteelGravity   Type: Gravity
*Dload, op=NEW
, GRAV, 8829., 0., 0., -1.
** Name: D_S_mW_Contact_1   Type: Concentrated force
*Cload, op=NEW
** Name: D_S_mW_Contact_2   Type: Concentrated force
*Cload, op=NEW
** Name: D_S_mW_Contact_3   Type: Concentrated force
*Cload, op=NEW
** Name: D_S_mW_Contact_4   Type: Concentrated force
*Cload, op=NEW
** Name: D_S_mW_SteelGravity   Type: Gravity
*Dload, op=NEW
**
** OUTPUT REQUESTS
**
*Restart, write, frequency=0
**
** FIELD OUTPUT: Nodal
**
*Output, field, frequency=99999
*Node Output
RF, RM, U
**
** FIELD OUTPUT: Section_P2
**
*Element Output, elset=FRAME.P2, directions=YES
1, 2, 3, 4, 5, 6, 7, 8, 9, 10, 11, 12, 13, 14, 15, 16
S, SF
*Element Output, elset=FRAME.P2, directions=YES
17, 18, 19, 20, 21, 22, 23, 24, 25, 26, 27, 28, 29, 30, 31, 32
S, SF
*Element Output, elset=FRAME.P2, directions=YES
33, 34, 35, 36, 37, 38, 39, 40, 41, 42, 43, 44, 45, 46, 47, 48
S, SF
*Element Output, elset=FRAME.P2, directions=YES
49, 50, 51, 52, 53, 54, 55, 56, 57, 58, 59, 60, 61, 62, 63, 64
S, SF
*Element Output, elset=FRAME.P2, directions=YES
65, 66, 67, 68, 69, 70, 71, 72, 73, 74, 75
S, SF
**
** FIELD OUTPUT: Section_P3
**
*Element Output, elset=FRAME.P3, directions=YES
1, 2, 3, 4, 5, 6, 7, 8, 9, 10, 11, 12, 13, 14, 15, 16
S, SF
*Element Output, elset=FRAME.P3, directions=YES
17, 18, 19, 20, 21, 22, 23, 24, 25, 26, 27, 28, 29, 30, 31, 32
S, SF
*Element Output, elset=FRAME.P3, directions=YES
33, 34, 35, 36, 37, 38, 39, 40, 41, 42, 43, 44, 45, 46, 47, 48
S, SF
*Element Output, elset=FRAME.P3, directions=YES
49, 50, 51, 52, 53, 54, 55, 56, 57, 58, 59, 60, 61, 62, 63, 64
S, SF
*Element Output, elset=FRAME.P3, directions=YES
65, 66, 67, 68, 69, 70, 71, 72, 73, 74, 75
S, SF
**
** FIELD OUTPUT: Section_P4
**
*Element Output, elset=FRAME.P4, directions=YES
1, 2, 3, 4, 5, 6, 7, 8, 9, 10, 11, 12, 13, 14, 15, 16
S, SF
*Element Output, elset=FRAME.P4, directions=YES
17, 18, 19, 20, 21, 22, 23, 24, 25, 26, 27, 28, 29, 30, 31, 32
S, SF
*Element Output, elset=FRAME.P4, directions=YES
33, 34, 35, 36, 37, 38, 39, 40, 41, 42, 43, 44, 45, 46, 47, 48
S, SF
*Element Output, elset=FRAME.P4, directions=YES
49, 50, 51, 52, 53, 54, 55, 56, 57, 58, 59, 60, 61, 62, 63, 64
S, SF
*Element Output, elset=FRAME.P4, directions=YES
65, 66, 67, 68, 69, 70, 71, 72, 73, 74, 75
S, SF
**
** FIELD OUTPUT: Section_P5
**
*Element Output, elset=FRAME.P5, directions=YES
1, 2, 3, 4, 5, 6, 7, 8, 9, 10, 11
S, SF
**
** FIELD OUTPUT: Section_P6
**
*Element Output, elset=FRAME.P6, directions=YES
1, 2, 3, 4, 5, 6, 7
S, SF
**
** HISTORY OUTPUT: Energy
**
*Output, history
*Energy Output
ALLSE, ALLWK
*End Step
** ----------------------------------------------------------------
**
** STEP: C09D_mW
**
*Step, name=C09D_mW, nlgeom=NO, inc=1000
*Static
1., 1., 1e-05, 1.
**
** LOADS
**
** Name: C09D_W_Contact_1   Type: Concentrated force
*Cload, op=NEW
** Name: C09D_W_Contact_2   Type: Concentrated force
*Cload, op=NEW
** Name: C09D_W_Contact_3   Type: Concentrated force
*Cload, op=NEW
** Name: C09D_W_Contact_4   Type: Concentrated force
*Cload, op=NEW
** Name: C09D_W_SteelGravity   Type: Gravity
*Dload, op=NEW
** Name: C09D_mW_Contact_1   Type: Concentrated force
*Cload, op=NEW
CONTACT_ROW_1, 2, -35.556
CONTACT_ROW_1, 3, -38.0225
** Name: C09D_mW_Contact_2   Type: Concentrated force
*Cload, op=NEW
CONTACT_ROW_2, 2, -35.556
CONTACT_ROW_2, 3, -38.0225
** Name: C09D_mW_Contact_3   Type: Concentrated force
*Cload, op=NEW
CONTACT_ROW_3, 2, -35.556
CONTACT_ROW_3, 3, -38.0225
** Name: C09D_mW_Contact_4   Type: Concentrated force
*Cload, op=NEW
CONTACT_ROW_4, 2, -35.556
CONTACT_ROW_4, 3, -38.0225
** Name: C09D_mW_SteelGravity   Type: Gravity
*Dload, op=NEW
, GRAV, 8829., 0., 0., -1.
**
** OUTPUT REQUESTS
**
*Restart, write, frequency=0
**
** FIELD OUTPUT: Nodal
**
*Output, field, frequency=99999
*Node Output
RF, RM, U
**
** FIELD OUTPUT: Section_P2
**
*Element Output, elset=FRAME.P2, directions=YES
1, 2, 3, 4, 5, 6, 7, 8, 9, 10, 11, 12, 13, 14, 15, 16
S, SF
*Element Output, elset=FRAME.P2, directions=YES
17, 18, 19, 20, 21, 22, 23, 24, 25, 26, 27, 28, 29, 30, 31, 32
S, SF
*Element Output, elset=FRAME.P2, directions=YES
33, 34, 35, 36, 37, 38, 39, 40, 41, 42, 43, 44, 45, 46, 47, 48
S, SF
*Element Output, elset=FRAME.P2, directions=YES
49, 50, 51, 52, 53, 54, 55, 56, 57, 58, 59, 60, 61, 62, 63, 64
S, SF
*Element Output, elset=FRAME.P2, directions=YES
65, 66, 67, 68, 69, 70, 71, 72, 73, 74, 75
S, SF
**
** FIELD OUTPUT: Section_P3
**
*Element Output, elset=FRAME.P3, directions=YES
1, 2, 3, 4, 5, 6, 7, 8, 9, 10, 11, 12, 13, 14, 15, 16
S, SF
*Element Output, elset=FRAME.P3, directions=YES
17, 18, 19, 20, 21, 22, 23, 24, 25, 26, 27, 28, 29, 30, 31, 32
S, SF
*Element Output, elset=FRAME.P3, directions=YES
33, 34, 35, 36, 37, 38, 39, 40, 41, 42, 43, 44, 45, 46, 47, 48
S, SF
*Element Output, elset=FRAME.P3, directions=YES
49, 50, 51, 52, 53, 54, 55, 56, 57, 58, 59, 60, 61, 62, 63, 64
S, SF
*Element Output, elset=FRAME.P3, directions=YES
65, 66, 67, 68, 69, 70, 71, 72, 73, 74, 75
S, SF
**
** FIELD OUTPUT: Section_P4
**
*Element Output, elset=FRAME.P4, directions=YES
1, 2, 3, 4, 5, 6, 7, 8, 9, 10, 11, 12, 13, 14, 15, 16
S, SF
*Element Output, elset=FRAME.P4, directions=YES
17, 18, 19, 20, 21, 22, 23, 24, 25, 26, 27, 28, 29, 30, 31, 32
S, SF
*Element Output, elset=FRAME.P4, directions=YES
33, 34, 35, 36, 37, 38, 39, 40, 41, 42, 43, 44, 45, 46, 47, 48
S, SF
*Element Output, elset=FRAME.P4, directions=YES
49, 50, 51, 52, 53, 54, 55, 56, 57, 58, 59, 60, 61, 62, 63, 64
S, SF
*Element Output, elset=FRAME.P4, directions=YES
65, 66, 67, 68, 69, 70, 71, 72, 73, 74, 75
S, SF
**
** FIELD OUTPUT: Section_P5
**
*Element Output, elset=FRAME.P5, directions=YES
1, 2, 3, 4, 5, 6, 7, 8, 9, 10, 11
S, SF
**
** FIELD OUTPUT: Section_P6
**
*Element Output, elset=FRAME.P6, directions=YES
1, 2, 3, 4, 5, 6, 7
S, SF
**
** HISTORY OUTPUT: Energy
**
*Output, history
*Energy Output
ALLSE, ALLWK
*End Step
